# AguaClara Water Treatment Plants
# Design References
# MathCAD dimension calculations:
# Variable Naming Guide
# The list below is the list names that can be used before the period for the subscript in our variable names.
# Major Plant Components. These items follow the period in the variable name
# [reference: BasicInputs.xmcd]
# [reference: ExpertInputs.xmcd]
# [reference: MathFunctions.xmcd]
# [reference: PipeDatabase.xmcd]
# [reference: FluidsFunctions.xmcd]
# [reference: SedimentationTank.xmcd]
# [reference: Flocculator.xmcd]
# [reference: LFOM.xmcd]
[
    "Subscripts", "";
    "component key", "Description";
    "Et", "Entrance tank";
    "Lfom", "Linear flow orifice meter";
    "Rm", "Rapid mix";
    "Floc", "Flocculation tank";
    "Sed", "Sedimentation tank";
    "Fi", "Stacked Rapid Sand Filter"
]
# [reference: EntranceTank.xmcd]
# [reference: StackedRapidSandFilter.xmcd]
# [reference: LinearCdc.xmcd]
# [reference: ChemStorageTanks.xmcd]
# [reference: MaterialsList.xmcd]
# AutoCAD drawing programs:
# Translators:
# These are the codes that take MathCAD outputs and create AutoCAD scripts that are used to draw the plant (formerly Basics)
# [reference: MtoATranslators.xmcd]
# The wrapped MtoA translator contains the functions that the user will want to access. These functions will draw pieces with full functionality - specifying the location, dimension, and orientation of the object. Also, it contains layer control and subtraction capabilities for grouped objects.
# [reference: MtoATranslatorsWrapped.xmcd]
# Plant Elements:
# These are all of the files that draw the fundamental parts of the plants (tees, elbows, tanks, pipes, etc)
[
    "Symbol", "Description", "Dimensions";
    "Amp", "amplitude", "L";
    "B", "perpendicular distance between components (center to center)", "L";
    "D", "Diameter", "L";
    "E", "pipe roughness", "L";
    "FB", "Freeboard", "L";
    "H", "height (includes freeboard)", "L";
    "HL", "head loss", "L";
    "HW", "local water depth", "L";
    "ID", "inner diameter", "L";
    "L", "length", "L";
    "Loc", "Locations", "L";
    "ND", "nominal diameter", "L";
    "OD", "outer diameter", "L";
    "R", "Radius", "L";
    "S", "space between components", "L";
    "T", "thickness", "L";
    "W", "width", "L";
    "Z", "elevation relative to bottom of sed tank", "L";
    "ZW", "water depth relative to bottom of sed tank", "L";
    "V", "velocity", "L/T";
    "CP", "Collision Potential", "L^(2/3)";
    "A", "Area", "L^2";
    "Nu", "kinematic viscosity", "L^2/T";
    "ED", "energy dissipation rate", "L^2/T^3";
    "Vol", "volume", "L^3";
    "Q", "flow", "L^3/T";
    "MW", "Molecular weight", "M";
    "C", "Concentration", "M/L^3";
    "Rho", "Density", "M/L^3";
    "AN", "angle", "radians";
    "Ti", "time", "T";
    "EN", "Enumerated type", "dimensionless";
    "N", "Number", "dimensionless";
    "Pi", "dimensionless geometric ratio", "";
    "AC", "AutoCAD command string", "";
    "K", "minor loss coefficient", ""
]
# [reference: ChannelF.xmcd]
# [reference: PlumbingF.xmcd]
# [reference: TankF.xmcd]
# [reference: StairsF.xmcd]
# [reference: DrainChannelF.xmcd]
# Specific Pieces:
# These are the codes that draw the bigger pieces of the plant (the sed tank, floc tank, etc)
# [reference: FlocculatorAC.xmcd]
# [reference: SedimentationTankAC.xmcd]
# [reference: EntranceTankAC.xmcd]
# [reference: ChemStockTanksAC.xmcd]
# [reference: StackedRapidSandFilterAC.xmcd]
# [reference: CdcAC.xmcd]
# [reference: OperatorAccessAC.xmcd]
# AutoCAD Materials:
# Adds the option of assigning materials to the entire plant design.
# [reference: MaterialsAC.xmcd]
# Layouts:
# [reference: LayoutsAC.xmcd]
# Entrance Tank
L_Et = 6.31478 m
H_EtHopper = 0.522975 m
W_Et = 0.838963 m
L_EtHopper = 1.24755 m
H_Et = 0.822975 m
ND_EtOverflowDrain = 8 in
L_EtDrainStopper = 0.818975 m
L_EtOverflowWeir = 1.41423 m
W_EtOverflowSlot = 0.120716 m
ND_EtFlowControl = 6 in
H_EtOverflowCutaway = 0.0201193 m
ND_EtDrain = 3 in
B_EtRebar = 0.025796 m
# Chem Tanks
Vol_CoagTank = 600 L
C_CoagStock = 384 kg/m^3
Vol_ChlorineTank = 450 L
C_ChlorStock = 32 kg/m^3
# Sedimentation
# Sed Tanks and Slopes:
N_SedTanks = 3
L_Sed = 6.31478 m
N_SedBays = 2  # Number of bays of inlet manifolds in each sed tank
# Length of the port through which water exits the inlet manifold
# Width of ferrous cement plates in whice one manifold port is cut
Q_SedBay = 5.33333 L/s
# Sedimentation Tank Sludge Drain:
N_SedSludgeOrifices = 48  # per cell
Ti_SludgeDrain = 30 min  # Tank Drain time
W_SedSludge = 9.1491 cm  # Width of the sludge channel
B_SedSludgeOrifices = 10.4067 cm  # Distance center to center between drain orifices
# Depth of the sludge channel
H_SedSludge = 9.1491 cm
W_SedDrainCover = 13.1491 cm
D_SedSludgeOrifice = 0.00932078 m  # Diameter of drain orifices
N_SedSludgeOrifices = 48
# Sedimentation Tank Dimensions:
Z_SedSludge = 0.091491 m  # Height from 0 of the top of the sludge drain
# Height from 0 of the top of the inlet manifold
W_Sed = 2.1336 m
L_Sed = 6.31478 m  # Total tank length
# Inlet Channel:
HW_SedInletChannel = 0.392101 m  # Width of the drop chimneys connecting channel to sed inlet manifolds
W_SedInletChannel = 0.582538 m  # length of drop chimmneys
L_SedChannel = 6.7008 m
H_SedInletChannel = 0.492101 m
# Sedimentation Tank Effluent Launder:
N_SedLaunderOrifices = 49  # Number of orifices per launder  # More Launder Dimensions
ND_SedLaunder = 6 in
Q_SedLaunderOrifices = 0.000108844 m^3/s
# Center to center launder spacing
L_SedLaunder = 5.09052 m
B_SedLaunderOrifices = 0.1 m
D_SedLaunderOrifice = 0.625 in
# Exit Channel:
W_SedExitChannel = 0.435037 m
H_SedExitChannel = 0.492101 m
HW_SedExitChannel = 0.352101 m  # water height in exit channel from 0
# Lamella:
L_SedPlate = 0.6 m  # center to center distance between lamella
B_SedPlate = 2.7 cm  # spacing between lamella
S_SedPlate = 2.5 cm
N_SedPlates = 160  # Number of Sed Plates per Sedimentation Tank Bay.
AN_SedPlate = 60 deg
L_SedActive = 4.986 m
V_SedUp = 86.2649 m/day
Z_SedLaunder = 1.69734 m
N_SedPlates = 160
HW_Sed = 1.84837 m
H_Sed = 1.94837 m
# Flocculator
# create a string that tells you whether the flocculator is horizontal or vertical:
EN_FlocType :=
    "horizontal" if EN_FlocHoriz == 1
    "vertical" otherwise
# Look at Flocculator Positioning arrays
W_FlocChannel = 0.54 m
# Fill last channel with bafffles from last channel
ED_Floc = 10 mW/kg
# Fix port width to be based on energy dissipation in that channel
# Adjust spacing after the number of baffles per channel is known.
HW_FlocEnd = 1.84837 m
# Check the residence time of the flocculator should be at least 20minutes
X_FlocBaffles = [
    0.524398, 0.524398, 0.524398, 1.0508;
    1.0508, 1.0508, 1.0508, 1.57719;
    1.57719, 1.57719, 1.57719, 2.10359;
    2.10359, 2.10359, 2.10359, 2.62999;
    2.62999, 2.62999, 2.62999, 3.15639;
    3.15639, 3.15639, 3.15639, 3.68279;
    3.68279, 3.68279, 3.68279, 4.20919;
    4.20919, 4.20919, 4.20919, 4.73558;
    4.73558, 4.73558, 4.73558, 5.26198;
    5.26198, 5.26198, 5.26198, 5.78838;
    5.78838, 5.78838, 5.78838, 0
] m
L_FlocBaffles = [
    1.06177, 1.06177, 1.06177, 1.18828;
    1.18828, 1.18828, 1.18828, 1.06177;
    1.06177, 1.06177, 1.06177, 1.18828;
    1.18828, 1.18828, 1.18828, 1.06177;
    1.06177, 1.06177, 1.06177, 1.18828;
    1.18828, 1.18828, 1.18828, 1.06177;
    1.06177, 1.06177, 1.06177, 1.18828;
    1.18828, 1.18828, 1.18828, 1.06177;
    1.06177, 1.06177, 1.06177, 1.18828;
    1.18828, 1.18828, 1.18828, 1.06177;
    1.06177, 1.06177, 1.06177, 0
] m
Z_FlocBaffles = [
    0, 0, 0, 0.786597;
    0.786597, 0.786597, 0.786597, 0;
    0, 0, 0, 0.786597;
    0.786597, 0.786597, 0.786597, 0;
    0, 0, 0, 0.786597;
    0.786597, 0.786597, 0.786597, 0;
    0, 0, 0, 0.786597;
    0.786597, 0.786597, 0.786597, 0;
    0, 0, 0, 0.786597;
    0.786597, 0.786597, 0.786597, 0;
    0, 0, 0, 0
] m
N_FlocChannels = 4
HL_Floc = 7.65028 cm
HW_FlocStart = 1.92487 m
S_FlocBaffle = [52.4398; 52.4398; 52.4398; 52.4398] cm
B_FlocBaffle = [52.6398; 52.6398; 52.6398; 52.6398] cm
N_FlocChannelBaffles = [11; 11; 11; 10]
W_FlocPort = [0.504398; 0.504398; 0.504398; 0.392538] m
L_FlocBaffleLower = 1.06177 m
L_FlocBaffleUpper = 1.18828 m
H_FlocPort = [0.842117; 0.842117; 0.842117; 0.842117] m
# Materials List
N_Valves = 6
N_ValveCouplings = 6
N_SedPlatesTotal = 960
N_SedPlatesPerSheet = 5
N_SedPlateSheets = 192
# AutoCAD Scripts
AC_SedTank =  # no stored result
AC_EntranceTank =  # no stored result
AC_FlocTank =  # no stored result
AC_Filter =  # no stored result
AC_ChemTanks =  # no stored result
AC_OperatorAccess = [
    "-layer m OpWalkwayCon"; "c t 132,132,132"; "OpWalkwayCon"; "  "; "_-view o f"; "_pline"; "-13.41643,2.78254"; "-13.11643,2.78254"; "-13.11643,2.59307"; "-12.81643,2.59307"
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]
AC_ZLayout := AC_Layout
AC_Cdc = [
    "-layer m Cdc";
    "c t 125,0,160";
    "Cdc";
    "  ";
    "-insert https://confluence.cornell.edu/download/attachments/173604905/CdcLeverArm.dwg";
    "-6.04413,10.92907,2.49474 x 1 1  270";
    "-insert https://confluence.cornell.edu/download/attachments/173604905/CdcLeverArmBracket.dwg";
    "-6.45688,10.89707,2.46984 x 1 1  270";
    "-insert https://confluence.cornell.edu/download/attachments/173604905/CdcCht.dwg";
    "-7.39023,10.92907,2.58754 x 1 1  90"
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]
AC_ZLayout = ["laythw -view _SEISO "]
AC_MatApply = ["-insert https://confluence.cornell.edu/download/attachments/173604905/CdcLeverArm.dwg"; "0,0,0 x 1 1  0"]
# [component: inputs AC_EntranceTank]
